# Afstand fra reference-mikrofon til trommehinden:
a := 5 cm
# Lydens hastighed
v_lyd := 343 m/s
# Tid det tager fra ref-mikrofon til speaker:
t := a/v_lyd = 0.145773 ms
# BF533 med 90% belastning:
f_BF533 := 600 MHz*0.9 = 540 MHz
# En clock-cycle tager derfor:
T_BF533 := 1/f_BF533 = 1.85185 ns
# Antallet af clock cycle BF533 kan nå inden t
clock_cycle := t/T_BF533 = 78717.2
# Antal samples for ADC
# Samplingfrekvens:
f_s := 48 kHz
# Buffer størrelse:
n := 4
ADC_clock_cycle := f_BF533/f_s*n = 45000
ADC_clock_cycle < clock_cycle = 1
